// SBML level 2 version 3

model glycosome_2()

  // Compartments:
  compartment glycosome = 1;
  compartment mitochondrie = 1;
  compartment cytosol = 1;

  // Species:
  substanceOnly species AcetylCoa in mitochondrie = 0;
  substanceOnly species Malate_mito in mitochondrie = 0;
  substanceOnly species Acetate in mitochondrie = 0;
  substanceOnly species NADH in glycosome = 2000;
  substanceOnly species Succinate_2 in mitochondrie = 0;
  substanceOnly species NADPH in glycosome = 2000;
  substanceOnly species NADPplus in glycosome = 2000;
  substanceOnly species Pyruvate in cytosol = 0;
  substanceOnly species Succinate_1 in glycosome = 0;
  substanceOnly species Fumarate in glycosome = 0;
  substanceOnly species Malate in glycosome = 0;
  substanceOnly species Oxac in glycosome = 0;
  substanceOnly species PEP in cytosol = 0;
  substanceOnly species ATP_2 in cytosol = 2000;
  substanceOnly species ATP in glycosome = 2000;
  substanceOnly species ADP_2 in cytosol = 4000;
  substanceOnly species PGA in cytosol = 0;
  substanceOnly species ADP in glycosome = 2000;
  substanceOnly species NADplus in glycosome = 2000;
  substanceOnly species BPGA in cytosol = 0;
  substanceOnly species Glycerol in glycosome = 0;
  substanceOnly species Gly_3_P in glycosome = 0;
  substanceOnly species G_3_P in glycosome = 0;
  substanceOnly species DHAP in glycosome = 0;
  substanceOnly species FBP in glycosome = 0;
  substanceOnly species Fructose_6_phosphate in glycosome = 0;
  substanceOnly species Glucose_6_phosphate in glycosome = 0;
  substanceOnly species Dglucose in glycosome = 1000;

  // Reactions:
  transition_70: Malate => Malate_mito; 20;
  transition_68: Pyruvate => AcetylCoa; 100;
  transition_B: AcetylCoa => Acetate; 100;
  transition_A: Malate_mito => Succinate_2; 100;
  transition_22: NADPplus + Malate => NADPH + Pyruvate; 30;
  transition_13: ADP_2 + PEP => ATP_2 + Pyruvate; 15;
  transition_15: PEP + ADP => ATP + Pyruvate; 15;
  transition_18: NADH + Fumarate => NADplus + Succinate_1; 100;
  transition_17: Malate => Fumarate; 50;
  transition_16: NADH + Oxac => NADplus + Malate; 100;
  transition_14: ADP + PEP => ATP + Oxac; 70;
  transition_11_12: PGA => PEP; 100;
  transition_9: ADP_2 + BPGA => ATP_2 + PGA; 100;
  transition_10: ADP + BPGA => PGA + ATP; 0;
  transition_8: NADplus + G_3_P => NADH + BPGA; 100;
  transition_7: ADP + Gly_3_P => ATP + Glycerol; 100;
  transition_6: NADH + DHAP => NADplus + Gly_3_P; 0;
  transition_5: DHAP => G_3_P; 100;
  transition_4: FBP => G_3_P + DHAP; 100;
  transition_3: ATP + Fructose_6_phosphate => ADP + FBP; 100;
  transition_2: Glucose_6_phosphate => Fructose_6_phosphate; 100;
  transition_1: ATP + Dglucose => ADP + Glucose_6_phosphate; 100;
end
